# Экспоненциальное распределение
x := 0, 1, ..*∞  # error: This variable is undefined.
# 2. Ф-ция распределения
# 1. Ф-ция плотности распределения
P(x, r) := pexp(x, r)
P(x, r) := 1 - exp(-r*x)
f(x, r) := dexp(x, r)
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# 3. Начальные моменты
a1(r) := integral(x*f(x, r), x = 0 .. ∞)
a2(r) := integral(x^2*f(x, r), x = 0 .. ∞)
a3(r) := integral(x^3*f(x, r), x = 0 .. ∞)
# 4. Математическое ожидание
m1(r) := a1(r)
m1(0.5) = 2
m2(r) := 1/r
m2(0.5) = 2
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# 5. Мода
Mo(1) = 0  # error: This variable is undefined.
# Мода - наиболее вероятное значение СВ, для НСВ - это максимум ф-ции плотности распределения, из графиков => Mo = 0
# 6. Медиана
Me(r) := ln(2)/r
Me(0.5) = 1.38629
# 7. Дисперсия
D1(r) := a2(r) - a1(r)^2
D1(1) = 1
D2(r) := 1/r^2
D2(1) = 1
D2(1.5) = 0.444444
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# 8. Среднее квадратическое отклонение
Sigma(r) := sqrt(D1(r))
Sigma(1.5) = 0.666667
# 9. Коэффициент ассиметрии
μ3(r) := 2*a1(r)^3 - 3*a1(r)*a2(r) + a3(r)
As(r) := μ3(r)/Sigma(r)^3
As(1) = 2
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