# Экспоненциальное распределение
# 1. Функция плотности распределения | 2. Функция распределения
t := 0, 0.1 .. 20
λ := 0.5, 1 .. 1.5
F(t, λ) := 1 - e^(-λ*t)
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f(t, λ) := λ*e^(-λ*t)
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# Математическое ожидание
M(λ) := integral(t*f(t, λ), t = 0 .. ∞)
M(λ) = [2; 1; 0.666667]
# Дисперсия
D(λ) := integral(t^2*f(t, λ), t = 0 .. ∞) - M(λ)^2
D(λ) = [4; 1; 0.444444]
# СКО
σ(λ) := sqrt(D(λ))
σ(λ) = [2; 1; 0.666667]
# 3. Функциональные зависимости и параметры, полученные с помощью имитации экспоненциального распределения методом обратных функций
N := 100000
i := 1 .. N
Y1 := runif(N, 0, 1)  # Математическое ожидание
X11 := -ln(1 - Y1)/0.5
X12 := -ln(1 - Y1)/1
X13 := -ln(1 - Y1)/1.5
M12 := sum(X12[i], i = 0 .. N - 1)/N
M13 := sum(X13[i], i = 0 .. N - 1)/N
M11 := sum(X11[i], i = 0 .. N - 1)/N
X21 := sort(X11)
X22 := sort(X12)
X23 := sort(X13)
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# Дисперсия
D11 := sum(X11[i]^2, i = 0 .. N - 1)/N - M11^2
D12 := sum(X12[i]^2, i = 0 .. N - 1)/N - M12^2
D13 := sum(X13[i]^2, i = 0 .. N - 1)/N - M13^2
# 4. Сравнение результатов
M(λ) = [2; 1; 0.666667]
D(λ) = [4; 1; 0.444444]
M11 = 2.00277
D11 = 4.02149
M12 = 1.00139
D12 = 1.00537
M13 = 0.667591
D13 = 0.446833
bin := 10
j := 1 .. bin + 1
lower1 := floor(min(X11))
lower2 := floor(min(X12))
lower3 := floor(min(X13))
upper1 := ceil(max(X11))
upper2 := ceil(max(X12))
upper3 := ceil(max(X13))
h1 := (upper1 - lower1)/bin
h2 := (upper2 - lower2)/bin
h3 := (upper3 - lower3)/bin
int1[j] := lower1 + h1*j
int2[j] := lower2 + h2*j
int3[j] := lower3 + h3*j
t1 := hist(int1, X11)/(N*h1)
t2 := hist(int2, X12)/(N*h2)
t3 := hist(int3, X13)/(N*h3)
int1 := int1 + h1/2
int2 := int2 + h2/2
int3 := int3 + h3/2
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