# Экспоненциальное распределение
# 1. Исходные данные для статистического анализа
N0 := 100000
h := 0.05
# Функция плотности распределения:
f(t, λ) := λ*e^(-λ*t)
i := 1 .. N0
Y := runif(N0, 0, 1)
# Функция распределения:
F(t, λ) := 1 - e^(-λ*t)
X1 := -ln(1 - Y)/0.5
X2 := -ln(1 - Y)/1
X3 := -ln(1 - Y)/1.5
X11 := sort(X1)
X12 := sort(X2)
X13 := sort(X3)
N2(t) :=
    i ← 0
    while t > X12[i]
        i ← i + 1
    N0 - i
N3(t) :=
    i ← 0
    while t > X13[i]
        i ← i + 1
    N0 - i
N1(t) :=
    i ← 0
    while t > X11[i]
        i ← i + 1
    N0 - i
T1max := round(max(X11)/h, 0)
T2max := round(max(X12)/h, 0)
T3max := round(max(X13)/h, 0)
i := 0 .. T1max
j := 0 .. T2max
k := 0 .. T3max
T1[i] := i*h
T2[j] := j*h
T3[k] := k*h
i := 0 .. T1max - 1
j := 0 .. T2max - 1
k := 0 .. T3max - 1
# 2. Функция надежности
# Cтатистические функции надёжности:
P2[j] := N2(T2[j])/N0
P3[k] := N3(T3[k])/N0
# Теоретическая функция надёжности:
P1[i] := N1(T1[i])/N0
P(t, λ) := e^(-λ*t)
P2[T2max] := 0
P3[T3max] := 0
P1[T1max] := 0
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# 3. Функция ненадежности
# Статистические функции ненадёжности:
# Теоретическая функция ненадёжности:
Q(t, λ) := 1 - P(t, λ)
Q1[i] := (N0 - N1(T1[i]))/N0
Q2[j] := (N0 - N2(T2[j]))/N0
Q3[k] := (N0 - N3(T3[k]))/N0
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# 4. Функция частоты
# Статистические функции  частоты отказов:
i := 0 .. T1max - 2
k := 0 .. T3max - 2
j := 0 .. T2max - 2
# Теоретическая функция частоты отказов:
f(t, λ) := λ*e^(-λ*t)
f1[i] := (N1(T1[i]) - N1(T1[i] + h))/(N0*h)
f3[k] := (N3(T3[k]) - N3(T3[k] + h))/(N0*h)
f2[j] := (N2(T2[j]) - N2(T2[j] + h))/(N0*h)
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# 5. Функция интенсивности | Статистические функции интенсивности отказов:
i := 0 .. T1max - 2
j := 0 .. T2max - 2
k := 0 .. T3max - 2
# Теоретическая функция интенсивности отказов:
Λ(t, λ) := f(t, λ)/P(t, λ)
Λ1[i] := (N1(T1[i]) - N1(T1[i] + h))/(N1(T1[i])*h)
Λ3[k] := (N3(T3[k]) - N3(T3[k] + h))/(N3(T3[k])*h)
Λ2[j] := (N2(T2[j]) - N2(T2[j] + h))/(N2(T2[j])*h)
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