ORIGIN := 1
n := 13
i := 1 .. n
t := sort(rexp(n, 0.05))
t = [0.06419; 0.902043; 2.64851; 2.96491; 4.8843; 4.97799; 10.1578; 12.3481; 13.0833; 15.4406; 15.9353; 35.8853; 57.2745]
Einit := 14
Kinit := 1
Given
sum(1/(Einit - i + 1) - Kinit*t[i], i = 1 .. n) == 0
∞
sum(1/Kinit - (Einit - i + 1)*t[i], i = 1 .. n) == 0
[Kjm; E0] := Find(Kinit, Einit) = [0.162059; 10.0366]
Kjm = 0.162059
E0 = 10.0366
E0 := round(E0)
E0 = 10
λ[i] := |Kjm*(E0 - i + 1)|
λ[n + 1] := |Kjm*(E0 - n)|
λ[n + 1] = 0.486178
P[i] := e^(-λ[i]*t[i])
m[i] := 1/λ[i]  # error: Divide by zero.
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m[n + 1] := 1/λ[n + 1]
P[n + 1] := e^(-λ[n + 1]*t[n + 1])  # error: This array index is invalid for this array.
m[n + 1] = 2.05686
P[n + 1] =  # error: This variable is undefined.
λ[i] = [1.62059; 1.45854; 1.29648; 1.13442; 0.972357; 0.810297; 0.648238; 0.486178; 0.324119; 0.162059; 0; 0.162059; 0.324119]
